# AguaClara Water Treatment Plants
# Design References
# MathCAD dimension calculations:
# Variable Naming Guide
# The list below is the list names that can be used before the period for the subscript in our variable names.
# Major Plant Components. These items follow the period in the variable name
# [reference: BasicInputs.xmcd]
# [reference: ExpertInputs.xmcd]
# [reference: MathFunctions.xmcd]
# [reference: PipeDatabase.xmcd]
# [reference: FluidsFunctions.xmcd]
# [reference: SedimentationTank.xmcd]
# [reference: Flocculator.xmcd]
# [reference: LFOM.xmcd]
[
    "Subscripts", "";
    "component key", "Description";
    "Et", "Entrance tank";
    "Lfom", "Linear flow orifice meter";
    "Rm", "Rapid mix";
    "Floc", "Flocculation tank";
    "Sed", "Sedimentation tank";
    "Fi", "Stacked Rapid Sand Filter"
]
# [reference: LinearCdc.xmcd]
# [reference: ChemStorageTanks.xmcd]
# [reference: EntranceTank.xmcd]
# [reference: StackedRapidSandFilter.xmcd]
# [reference: MaterialsList.xmcd]
# AutoCAD drawing programs:
# Translators:
# These are the codes that take MathCAD outputs and create AutoCAD scripts that are used to draw the plant (formerly Basics)
# [reference: MtoATranslators.xmcd]
# The wrapped MtoA translator contains the functions that the user will want to access. These functions will draw pieces with full functionality - specifying the location, dimension, and orientation of the object. Also, it contains layer control and subtraction capabilities for grouped objects.
# [reference: MtoATranslatorsWrapped.xmcd]
# Plant Elements:
# These are all of the files that draw the fundamental parts of the plants (tees, elbows, tanks, pipes, etc)
[
    "Symbol", "Description", "Dimensions";
    "Amp", "amplitude", "L";
    "B", "perpendicular distance between components (center to center)", "L";
    "D", "Diameter", "L";
    "E", "pipe roughness", "L";
    "FB", "Freeboard", "L";
    "H", "height (includes freeboard)", "L";
    "HL", "head loss", "L";
    "HW", "local water depth", "L";
    "ID", "inner diameter", "L";
    "L", "length", "L";
    "Loc", "Locations", "L";
    "ND", "nominal diameter", "L";
    "OD", "outer diameter", "L";
    "R", "Radius", "L";
    "S", "space between components", "L";
    "T", "thickness", "L";
    "W", "width", "L";
    "Z", "elevation relative to bottom of sed tank", "L";
    "ZW", "water depth relative to bottom of sed tank", "L";
    "V", "velocity", "L/T";
    "CP", "Collision Potential", "L^(2/3)";
    "A", "Area", "L^2";
    "Nu", "kinematic viscosity", "L^2/T";
    "ED", "energy dissipation rate", "L^2/T^3";
    "Vol", "volume", "L^3";
    "Q", "flow", "L^3/T";
    "MW", "Molecular weight", "M";
    "C", "Concentration", "M/L^3";
    "Rho", "Density", "M/L^3";
    "AN", "angle", "radians";
    "Ti", "time", "T";
    "EN", "Enumerated type", "dimensionless";
    "N", "Number", "dimensionless";
    "Pi", "dimensionless geometric ratio", "";
    "AC", "AutoCAD command string", "";
    "K", "minor loss coefficient", ""
]
# [reference: ChannelF.xmcd]
# [reference: PlumbingF.xmcd]
# [reference: TankF.xmcd]
# [reference: StairsF.xmcd]
# [reference: DrainChannelF.xmcd]
# Specific Pieces:
# These are the codes that draw the bigger pieces of the plant (the sed tank, floc tank, etc)
# [reference: FlocculatorAC.xmcd]
# [reference: SedimentationTankAC.xmcd]
# [reference: EntranceTankAC.xmcd]
# [reference: ChemStockTanksAC.xmcd]
# [reference: StackedRapidSandFilterAC.xmcd]
# [reference: CdcAC.xmcd]
# [reference: OperatorAccessAC.xmcd]
# AutoCAD Materials:
# Adds the option of assigning materials to the entire plant design.
# [reference: MaterialsAC.xmcd]
# Layouts:
# [reference: LayoutsAC.xmcd]
# Sedimentation
# Sed Tanks and Slopes:
N_SedTanks = 4
L_Sed = 5.97221 m
N_SedBays = 2  # Number of bays of inlet manifolds in each sed tank
# Length of the port through which water exits the inlet manifold
# Width of ferrous cement plates in whice one manifold port is cut
Q_SedBay = 5 L/s
# Sedimentation Tank Sludge Drain:
N_SedSludgeOrifices = 45  # per cell
Ti_SludgeDrain = 30 min  # Tank Drain time
W_SedSludge = 8.86539 cm  # Width of the sludge channel
B_SedSludgeOrifices = 10.4582 cm  # Distance center to center between drain orifices
# Depth of the sludge channel
H_SedSludge = 8.86539 cm
W_SedDrainCover = 12.8654 cm
D_SedSludgeOrifice = 0.00924487 m  # Diameter of drain orifices
N_SedSludgeOrifices = 45
# Sedimentation Tank Dimensions:
Z_SedSludge = 0.0886539 m  # Height from 0 of the top of the sludge drain
# Height from 0 of the top of the inlet manifold
W_Sed = 2.1336 m
L_Sed = 5.97221 m  # Total tank length
# Inlet Channel:
HW_SedInletChannel = 0.42715 m  # Width of the drop chimneys connecting channel to sed inlet manifolds
W_SedInletChannel = 0.617538 m  # length of drop chimmneys
L_SedChannel = 8.9844 m
H_SedInletChannel = 0.52715 m
# Sedimentation Tank Effluent Launder:
N_SedLaunderOrifices = 46  # Number of orifices per launder  # More Launder Dimensions
ND_SedLaunder = 6 in
Q_SedLaunderOrifices = 0.000108696 m^3/s
# Center to center launder spacing
L_SedLaunder = 4.79949 m
B_SedLaunderOrifices = 0.1 m
D_SedLaunderOrifice = 0.625 in
# Exit Channel:
W_SedExitChannel = 0.3485 m
H_SedExitChannel = 0.52715 m
HW_SedExitChannel = 0.38715 m  # water height in exit channel from 0
# Lamella:
L_SedPlate = 0.6 m  # center to center distance between lamella
B_SedPlate = 2.7 cm  # spacing between lamella
S_SedPlate = 2.5 cm
N_SedPlates = 150  # Number of Sed Plates per Sedimentation Tank Bay.
AN_SedPlate = 60 deg
V_SedC =  # error: This variable is undefined.
L_SedActive = 4.67423 m
V_SedUp = 85.8639 m/day
Z_SedLaunder = 1.69377 m
N_SedPlates = 150
HW_Sed = 1.81665 m
H_Sed = 1.93599 m
# Flocculator
# Look at Flocculator Positioning arrays
W_FlocChannel = 0.76 m
# Fill last channel with bafffles from last channel
ED_Floc = 10 mW/kg
# Fix port width to be based on energy dissipation in that channel
# Adjust spacing after the number of baffles per channel is known.
HW_FlocEnd = 1.81665 m
# Check the residence time of the flocculator should be at least 20minutes
X_FlocBaffles = [
    0.42473, 0.42473, 0.42473, 0.851459;
    0.851459, 0.851459, 0.851459, 1.27819;
    1.27819, 1.27819, 1.27819, 1.70492;
    1.70492, 1.70492, 1.70492, 2.13165;
    2.13165, 2.13165, 2.13165, 2.55838;
    2.55838, 2.55838, 2.55838, 2.98511;
    2.98511, 2.98511, 2.98511, 3.41184;
    3.41184, 3.41184, 3.41184, 3.83857;
    3.83857, 3.83857, 3.83857, 4.2653;
    4.2653, 4.2653, 4.2653, 4.69203;
    4.69203, 4.69203, 4.69203, 5.11876;
    5.11876, 5.11876, 5.11876, 5.54549;
    5.54549, 5.54549, 5.54549, 0
] m
L_FlocBaffles = [
    1.17956, 1.17956, 1.17956, 1.31568;
    1.31568, 1.31568, 1.31568, 1.17956;
    1.17956, 1.17956, 1.17956, 1.31568;
    1.31568, 1.31568, 1.31568, 1.17956;
    1.17956, 1.17956, 1.17956, 1.31568;
    1.31568, 1.31568, 1.31568, 1.17956;
    1.17956, 1.17956, 1.17956, 1.31568;
    1.31568, 1.31568, 1.31568, 1.17956;
    1.17956, 1.17956, 1.17956, 1.31568;
    1.31568, 1.31568, 1.31568, 1.17956;
    1.17956, 1.17956, 1.17956, 1.31568;
    1.31568, 1.31568, 1.31568, 1.17956;
    1.17956, 1.17956, 1.17956, 0
] m
Z_FlocBaffles = [
    0, 0, 0, 0.637094;
    0.637094, 0.637094, 0.637094, 0;
    0, 0, 0, 0.637094;
    0.637094, 0.637094, 0.637094, 0;
    0, 0, 0, 0.637094;
    0.637094, 0.637094, 0.637094, 0;
    0, 0, 0, 0.637094;
    0.637094, 0.637094, 0.637094, 0;
    0, 0, 0, 0.637094;
    0.637094, 0.637094, 0.637094, 0;
    0, 0, 0, 0.637094;
    0.637094, 0.637094, 0.637094, 0;
    0, 0, 0, 0
] m
N_FlocChannels = 4
L_FlocTank =  # error
HL_Floc = 8.61211 cm
HW_FlocStart = 1.90277 m
S_FlocBaffle = [42.473; 42.473; 42.473; 42.473] cm
B_FlocBaffle = [42.673; 42.673; 42.673; 42.673] cm
N_FlocChannelBaffles = [13; 13; 13; 12]
W_FlocPort = [0.40473; 0.40473; 0.40473; 0.427538] m
HL_FlocChannels =  # error
L_FlocBaffleLower = 1.17956 m
L_FlocBaffleUpper = 1.31568 m
H_FlocPort = [1.19633; 1.19633; 1.19633; 1.19633] m
Ti_Floc =  # error  # residence time of the flocculator
N_FlocBaffles =  # error
# Materials List
N_Valves = 8
N_ValveCouplings = 8
N_SedPlatesTotal = 1200
N_SedPlatesPerSheet = 5
N_SedPlateSheets = 240
# AutoCAD Scripts
AC_SedTank =  # no stored result
AC_EntranceTank =  # no stored result
AC_FlocTank =  # no stored result
AC_Filter =  # no stored result
AC_ChemTanks =  # no stored result
AC_OperatorAccess = [
    "-layer m OpWalkwayCon"; "c t 132,132,132"; "OpWalkwayCon"; "  "; "_-view o f"; "_pline"; "-9.99686,2.75754"; "-9.69686,2.75754"; "-9.69686,2.56487"; "-9.39686,2.56487"
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]
AC_Cdc = [
    "-layer m Cdc";
    "c t 125,0,160";
    "Cdc";
    "  ";
    "-insert https://confluence.cornell.edu/download/attachments/173604905/CdcLeverArm.dwg";
    "-5.70156,14.20759,2.46974 x 1 1  270";
    "-insert https://confluence.cornell.edu/download/attachments/173604905/CdcLeverArmBracket.dwg";
    "-6.11431,14.17559,2.44484 x 1 1  270";
    "-insert https://confluence.cornell.edu/download/attachments/173604905/CdcCht.dwg";
    "-7.04766,14.20759,2.56254 x 1 1  90"
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]
AC_Layout = ["laythw -view _SEISO "]
AC_MatApply = ["-insert MaterialsInsert"; "0,0,0 x 1 1  0"]
